# [reference: Größen und Einheiten.mcdx]
# Aufgabe 1: Rektaszension und Sternzeit
# a)
# Frühlingspunkt := Schnittpunkt von Ekliptik und Himmelsäquator
# = Position der Sonne am ~20. März
# Abb. S. 23 PdU-3
M_Θ := 1.98892*10^30 kg
# Sternzeit (LST) := Stundenwinkel des Frühlingspunkts
# = Rektaszension der Sterne, die momentan im Meridian stehen (und gut zu beobachten sind -> nachts)
G := 6.674*10^-11 m^3/(kg*s^2)
# -> LST = Sonnenzeit, wenn Frühlingspunkt auf gegenüberliegender Seite der Sonne -> 21. September
AE := 149597870700 m
# alternativ:
# - in VL 3.11. 15:00 -> LST = 17h 40m
# - Verschiebung um 4min pro Tag
# -> ~22. September 15:00 && LST = 15h 00m
# alternativ 2: S. 25 PdU-3
# "Meridiandurchgang = Kulmination um Mitternacht" (=0:00)
# - α=0 am 22. September
# b)
# t:=LST-α
# LST (s.o.) = 11h 52m für den 21. März
# α=10h 40m
# -> t=1h 12m -> ja, am Abendhimmel sichtbar (Deklination im März 2012 ~10° -> sichtbar für δ > -20°
# c)
# Frühlingspunkt = Tag- und Nachtgleiche -> 12h
# Aufgabe 2: Helligkeit eines Teelichts
P_TL := 0.02 W
F_TL := P_TL/(4*π*r_Mond^2)
# m_V0 = 0 ->
F_0 := 3.2*10^-13 W/cm^2
m_TL := -2.5*log(F_TL/F_0) = 28.6822
# Aufgabe 3: Bestimmung der Größe von Umlaufbahnen
# a)
P_a := 5 day
M_a := 2*M_Θ
a(P, M) := nthroot(P^2*G*M/(4*π^2), 3)
a(P_a, M_a) = 10786497 km
a(P_a, M_a) = 0.0721033 AE
# alternativ:
P_Erde := 1 yr
a_Erde := 1 AE
P_Erde^2*M_Θ/a_Erde^3 = 5.91603e11 P^2*2 M_Θ/a^3*kg*s^2/m^3  # disabled
a_alt := nthroot(2*P_a^2/P_Erde^2, 3)*a_Erde = 10786026 km
# b)
a(100 day, 0.5*M_Θ) = 50066484 km
a(100 day, 0.5*M_Θ) = 0.334674 AE
# Aufgabe 4: Präzssion
# Aufgabe 5: Planung einer astronomischen Beobachtung
# a)
# ICRS coord. (ep=J2000) :  05 32 00.40009 -00 17 56.7424 (Optical) [ 4.92 2.38 90 ] A 2007A&A...474..653V
# FK5 coord. (ep=J2000 eq=2000) :  05 32 00.400 -00 17 56.74 [ 4.92 2.38 90 ]
# FK4 coord. (ep=B1950 eq=1950) :  05 29 27.03 -00 20 04.4 [ 28.10 14.37 0 ]
# Gal coord. (ep=J2000) :  203.8559 -17.7397 [ 4.92 2.38 90 ]
# b)
sec(30°) = 1.1547
# night hrs@sec.z:
# sec(z)<3, sec(z)<2, sec(z)<1.5
# 6.3  5.5  4.6
# -> 4.6h Paranal Observatory
