# [reference: Größen und Einheiten.mcdx]
# Aufgabe 1: Entfernungsmodul
F_0 := 3.2*10^13 W/cm^2
L_Θ := 3.846*10^26 W
m_V(F) := -2.5*log(F/F_0)
m_V(r) := m_V(L_Θ/(4*π*r^2))
# a)
m_V(28.000 ly) = 67.1637
# b)
m_V(2.5*10^6 ly) = 91.9177
# Aufgabe 2: Die nächstgelgene Zivilisation
V_Galaxis := π*(110000 ly)^2*9500 ly = 3.61126e14 ly^3
d_Ziv := nthroot(V_Galaxis/10000, 3) = 3305.37 ly
# Aufgabe 4: Jupiter als Exoplanet
# a)
r := 1.32 pc
# b)
m_VJupiter := -2.4
# c)
# d)
# e)
# Aufgabe 5: Zirkumpolare Sterne und Kulminationszeit
# a)
δ > 50°
δ > 90° - φ
# für immer sichtbar
φ > 90° - δ
δ_grenz := 50°
φ_grenz := 90° - δ_grenz = 40°
φ < φ_grenz
# b)
h_max(φ) := 90° - φ + δ
δ := 0°
# c)
α := 1 hr*11.5°/15° = 46 min
t := 23 hr + 26*min + α - 1 hr = 23.2 hr
tmodhr
