# Einheiten
ly := c*1 yr
AE := 149597870700 m
pc := 3.08567758149*10^16 m
' := 1°/60
'' := 1°/3600
mag := 1
u := 1.6605390*10^-27 kg
# Größen
r_Mond := 384400 km
R_Erde := 6371 km
M_Θ := 1.98892*10^30 kg
